// COMSOL Multiphysics 6.3.0.290 model "20260624-结构简化燃料电池-阴极尾气循环-清除解.mph"
// Outline of the model tree

Parameters
  M_O2 = 32[g/mol]
  rho_l = 1[g/cm^3]
  M_N2 = 28[g/mol]
  EW = 1.1[kg/mol]  // 干膜等效质量
  Cp_air = 1000[J/(kg*K)]  // 空气比热容
  T_ref = 25[degC]
  rho_PEM = 1980[kg/m^3]  // 干膜密度
  M_H2 = 2[g/mol]
  Cp_H2O = 4.2[kJ/(kg*K)]  // 水比热容
  M_H2O = 18[g/mol]
  T_a_in = exp_ta_in(case_idx)  // Bench anode inlet temperature
  T_c_in = exp_tc_in(case_idx)  // Bench cathode inlet temperature
  T_fc_init = 0.5*(exp_tcool_in(case_idx)+exp_tcool_out(case_idx))  // Bench thermal initial/reference temperature
  p_a_v_in = RH_a_in*p_sat_an(T_a_in)
  Y_a_v_in = x_a_v_in*M_H2O/(x_a_H2_in*M_H2+x_a_v_in*M_H2O)
  x_a_v_in = p_a_v_in/p_a_in
  Y_a_H2_in = x_a_H2_in*M_H2/(x_a_H2_in*M_H2+x_a_v_in*M_H2O)
  M_a_in = x_a_v_in*M_H2O+x_a_H2_in*M_H2
  rho_a_in = p_a_in*M_a_in/R_const/T_fc_init
  p_a_H2_in = p_a_in-p_a_v_in
  x_a_H2_in = p_a_H2_in/p_a_in
  p_c_O2_in = x_c_O2_in*p_c_in
  x_c_N2_in = 0.79*p_c_air_in/p_c_in
  x_c_O2_in = 0.21*p_c_air_in/p_c_in
  rho_c_in = p_c_in*M_c_in/R_const/T_fc_init
  Y_c_v_in = x_c_v_in*M_H2O/(x_c_N2_in*M_N2+x_c_O2_in*M_O2+x_c_v_in*M_H2O)
  p_c_air_in = p_c_in-p_c_v_in
  p_c_v_in = p_sat_an(T_c_in)*RH_c_in  // 分压
  Y_c_N2_in = x_c_N2_in*M_N2/(x_c_N2_in*M_N2+x_c_O2_in*M_O2+x_c_v_in*M_H2O)  // 质量分数
  p_c_N2_in = x_c_N2_in*p_c_in
  M_c_in = x_c_v_in*M_H2O+x_c_O2_in*M_O2+x_c_N2_in*M_N2
  x_c_v_in = 1-x_c_N2_in-x_c_O2_in
  Y_c_O2_in = x_c_O2_in*M_O2/(x_c_N2_in*M_N2+x_c_O2_in*M_O2+x_c_v_in*M_H2O)  // 氧气初始质量分数
  V_a_in = W_a_in/rho_a_in
  W_a_in = W_a_H2_in/Y_a_H2_in
  W_a_H2_reacted = M_H2*I_fc*A_cell/2/F_const
  U_a_in = V_a_in/L_CH/W_cell
  W_a_v_in = Y_a_v_in*W_a_in
  W_a_H2_in = lam_a*W_a_H2_reacted
  W_c_v_gen = M_H2O*I_fc*A_cell/2/F_const  // 电堆-阴极水蒸气产生流量
  V_c_in = W_c_in/rho_c_in
  W_c_O2_in = Y_c_O2_in*W_c_in  // Cathode oxygen inlet mass flow from measured total flow
  W_c_v_in = Y_c_v_in*W_c_in  // Cathode water-vapor inlet mass flow from measured total flow
  W_c_N2_in = Y_c_N2_in*W_c_in  // Cathode nitrogen inlet mass flow from measured total flow
  W_c_in = W_c_stack_in/N_cell  // Per-cell cathode inlet mass flow used by the single-MEA 2D model
  W_c_O2_reacted = M_O2*I_fc*A_cell/4/F_const  // 阴极氧气消耗流量
  U_c_in = V_c_in/L_CH/W_cell
  I_fc = exp_j(case_idx)  // Bench current density
  lam_c = W_c_O2_in/W_c_O2_reacted  // Per-cell cathode oxygen stoichiometry derived from stack flow divided by N_cell
  lam_a = exp_lama(case_idx)  // Bench anode stoichiometry
  p_a_in = exp_pa_in(case_idx)+1[atm]  // Bench anode inlet pressure
  p_c_out = exp_pc_out(case_idx)+1[atm]  // Bench cathode outlet pressure
  p_c_in = exp_pc_in(case_idx)+1[atm]  // Bench cathode inlet pressure
  RH_a_in = exp_rha_in(case_idx)  // Bench anode inlet RH
  p_a_out = exp_pa_out(case_idx)+1[atm]  // Bench anode outlet pressure
  RH_c_in = exp_rhc_in(case_idx)  // Bench cathode inlet RH
  alpha_cyc = exp_egr(case_idx)  // Bench cathode exhaust recirculation fraction
  RH_atm = 0.5  // 环境湿度
  T_atm = 25[degC]
  p_c_H2O_in_atm = p_H2O_atm*(p_c_in/p_atm)
  p_H2O_atm = RH_atm*p_sat_an(T_atm)
  p_atm = 1[atm]
  RH_c_in_atm = p_c_H2O_in_atm/p_sat_an(T_c_in)
  s_w_evap_min = 1e-2  // 阴极蒸发液水门控下限
  epsg_CH_c = 0.55
  L_GDL = 230[um]  // 气体扩散层厚度
  epsg_GDL = 0.6  // 气体扩散层孔隙率
  epsg_CH_a = 0.55
  L_cell = 28.5[cm]  // Single-cell active length from real short stack
  epsg_MPL = 0.45  // 气体扩散层孔隙率
  L_MPL = 30[um]
  N_cell = 16  // Number of cells in the stack
  epsg_CL = 0.3  // 催化层孔隙率
  W_cell = 13.3[cm]  // Single-cell active width from real short stack
  A_cell = 380[cm^2]  // Single-cell active area for current and reactant scaling
  L_CH = 350[um]  // 流道高度
  epss_ion = 0.2  // 阴极离聚物体积分数
  L_PEM = 20[um]  // 质子膜厚度
  L_CL = 10[um]  // 催化层厚度
  K_GDL = 1e-12[m^2]
  K_CH_c = 1e-9[m^2]
  K_CH_a = 1e-9[m^2]
  sigmal_MPL = 1000[S/m]
  sigmal_GDL = 1000[S/m]
  sigmal_CL = 1000[S/m]
  p_ec = 20[kPa]
  lambda_bc = 2
  s_rs_g = 0.01
  s_rs_w = 0.01
  k_cond = 1000[mol/(m^3*s)]  // 相变速率常数。控制冷凝快慢。
  k_evap = 100[mol/(m^3*s)]  // 相变速率常数。控制蒸发快慢。
  eps_rh = 0.01  // RH 平滑宽度。
  eps_s = 1e-3  // 饱和度平滑宽度。
  s_g_min = 0.05  // 最小气相空间阈值。
  s_rw_ce = 0.01  // 可蒸发液水阈值。
  case_idx = 1  // Bench fitting case index, 1..29
  I_stack_exp = exp_i(case_idx)  // Bench measured stack current
  rho_air_std = p_atm*(0.21*M_O2+0.79*M_N2)/R_const/273.15[K]  // Dry air density at standard volume-flow reference
  E_tn_cell = 1.482[V]  // Thermoneutral voltage used by lumped stack heat estimate
  UA_stack_lumped = 450[W/K]  // Initial lumped coolant heat-transfer conductance to be calibrated
  Cth_stack_lumped = 4.5e4[J/K]  // Full-stack lumped thermal capacitance for transient extension
  eta_heat_fit = 1  // Heat-generation correction factor for fitting
  rho_coolant = 997[kg/m^3]  // Coolant density used by lumped heat audit
  Cp_coolant_lumped = 4180[J/(kg*K)]  // Coolant heat capacity used by lumped heat audit
  eps_Q = 1e-9[W]  // Small guard for residual expressions
  W_c_stack_in = rho_air_std*exp_stack_qstd(case_idx)  // Measured total cathode inlet mass flow for the 16-cell stack
  UA_cool_stack = 450[W/K]  // Empirical coolant heat rejection coefficient for the full 16-cell stack
  UA_amb_stack = 5[W/K]  // Small ambient heat loss coefficient for the full stack
  T_amb_model = T_atm  // Ambient reference for stack heat loss

Functions
  an1: Analytic "水蒸气饱和压力与温度的关系" | funcname = p_sat_an; expr = 101.325*10^(-2.1794+0.02953*(T-273.15)-9.1837e-5*(T-273.15)^2+1.4454e-7*(T-273.15)^3); args = T; fununit = kPa; argunit = K
  pw1: Piecewise "水活度与平衡膜水含量之间的关系" | funcname = lambda_H2O_eq; arg = a; pieces = {{0, 1, 0.043+17.81*a-39.85*a^2+36.0*a^3}, {1, 3, 14+1.4*(a-1)}, {3, 4, 16.8}}; argunit = 1; fununit = 1
  an4: Analytic "膜水扩散系数" | funcname = Dd_eff; expr = 3.1e-7*lambda*(exp(0.28*lambda)-1)*exp(-2346/T)*(lambda<3)+4.17e-8*lambda*(161*exp(-lambda)+1)*exp(-2346/T)*(lambda>=3); args = {lambda, T}; fununit = m^2/s; argunit = {1, K}
  exp_j: Piecewise "Experimental current density"
    arg = case_idx
    pieces = 
      {0.5, 1.5, 0.1}
      {1.5, 2.5, 0.2}
      {2.5, 3.5, 0.3}
      {3.5, 4.5, 0.4}
      {4.5, 5.5, 0.6}
      {5.5, 6.5, 0.7}
      {6.5, 7.5, 0.9}
      {7.5, 8.5, 1.1}
      {8.5, 9.5, 1.3}
      {9.5, 10.5, 1.5}
      {10.5, 11.5, 1.7}
      {11.5, 12.5, 1.8}
      {12.5, 13.5, 1.9}
      {13.5, 14.5, 0.1}
      {14.5, 15.5, 0.1}
      {15.5, 16.5, 0.1}
      {16.5, 17.5, 0.1}
      {17.5, 18.5, 0.1}
      {18.5, 19.5, 0.1}
      {19.5, 20.5, 0.1}
      {20.5, 21.5, 0.1}
      {21.5, 22.5, 0.1}
      {22.5, 23.5, 0.1}
      {23.5, 24.5, 0.1}
      {24.5, 25.5, 0.1}
      {25.5, 26.5, 0.1}
      {26.5, 27.5, 0.1}
      {27.5, 28.5, 0.05}
      {28.5, 29.5, 0.05}
    argunit = 1
    fununit = A/cm^2
  exp_i: Piecewise "Experimental stack current"
    arg = case_idx
    pieces = 
      {0.5, 1.5, 38}
      {1.5, 2.5, 76}
      {2.5, 3.5, 114}
      {3.5, 4.5, 152}
      {4.5, 5.5, 228}
      {5.5, 6.5, 266}
      {6.5, 7.5, 342}
      {7.5, 8.5, 418}
      {8.5, 9.5, 494}
      {9.5, 10.5, 570}
      {10.5, 11.5, 646}
      {11.5, 12.5, 684}
      {12.5, 13.5, 722}
      {13.5, 14.5, 38}
      {14.5, 15.5, 38}
      {15.5, 16.5, 38}
      {16.5, 17.5, 38}
      {17.5, 18.5, 38}
      {18.5, 19.5, 38}
      {19.5, 20.5, 38}
      {20.5, 21.5, 38}
      {21.5, 22.5, 38}
      {22.5, 23.5, 38}
      {23.5, 24.5, 38}
      {24.5, 25.5, 38}
      {25.5, 26.5, 38}
      {26.5, 27.5, 38}
      {27.5, 28.5, 20}
      {28.5, 29.5, 20}
    argunit = 1
    fununit = A
  exp_vcell: Piecewise "Experimental cell voltage"
    arg = case_idx
    pieces = 
      {0.5, 1.5, 0.80165625}
      {1.5, 2.5, 0.7726375}
      {2.5, 3.5, 0.75044375}
      {3.5, 4.5, 0.73384375}
      {4.5, 5.5, 0.7102375}
      {5.5, 6.5, 0.701175}
      {6.5, 7.5, 0.68263125}
      {7.5, 8.5, 0.6660375}
      {8.5, 9.5, 0.646875}
      {9.5, 10.5, 0.62398125}
      {10.5, 11.5, 0.60195}
      {11.5, 12.5, 0.59018125}
      {12.5, 13.5, 0.57885625}
      {13.5, 14.5, 0.798}
      {14.5, 15.5, 0.794}
      {15.5, 16.5, 0.787}
      {16.5, 17.5, 0.782}
      {17.5, 18.5, 0.777}
      {18.5, 19.5, 0.768}
      {19.5, 20.5, 0.75}
      {20.5, 21.5, 0.793}
      {21.5, 22.5, 0.791}
      {22.5, 23.5, 0.79}
      {23.5, 24.5, 0.789}
      {24.5, 25.5, 0.788}
      {25.5, 26.5, 0.791}
      {26.5, 27.5, 0.785}
      {27.5, 28.5, 0.812}
      {28.5, 29.5, 0.818}
    argunit = 1
    fununit = V
  exp_egr: Piecewise "Experimental cathode EGR fraction"
    arg = case_idx
    pieces = 
      {0.5, 1.5, 0}
      {1.5, 2.5, 0}
      {2.5, 3.5, 0}
      {3.5, 4.5, 0}
      {4.5, 5.5, 0}
      {5.5, 6.5, 0}
      {6.5, 7.5, 0}
      {7.5, 8.5, 0}
      {8.5, 9.5, 0}
      {9.5, 10.5, 0}
      {10.5, 11.5, 0}
      {11.5, 12.5, 0}
      {12.5, 13.5, 0}
      {13.5, 14.5, 0}
      {14.5, 15.5, 0.0536594306}
      {15.5, 16.5, 0.2858217391}
      {16.5, 17.5, 0.3707279438}
      {17.5, 18.5, 0.4680959866}
      {18.5, 19.5, 0.5478621762}
      {19.5, 20.5, 0.6205626263}
      {20.5, 21.5, 0}
      {21.5, 22.5, 0.05314808853}
      {22.5, 23.5, 0.1952558824}
      {23.5, 24.5, 0.2190877358}
      {24.5, 25.5, 0.2303416667}
      {25.5, 26.5, 0}
      {26.5, 27.5, 0.1489428571}
      {27.5, 28.5, 0.4261}
      {28.5, 29.5, 0}
    argunit = 1
    fununit = 1
  exp_qstd: Piecewise "Experimental stack inlet standard volumetric flow"
    funcname = exp_stack_qstd
    arg = case_idx
    pieces = 
      {0.5, 1.5, 0.000828333333333}
      {1.5, 2.5, 0.00119666666667}
      {2.5, 3.5, 0.00150333333333}
      {3.5, 4.5, 0.00161}
      {4.5, 5.5, 0.00200666666667}
      {5.5, 6.5, 0.00221833333333}
      {6.5, 7.5, 0.00271833333333}
      {7.5, 8.5, 0.00332333333333}
      {8.5, 9.5, 0.00391833333333}
      {9.5, 10.5, 0.00452666666667}
      {10.5, 11.5, 0.00514666666667}
      {11.5, 12.5, 0.00543666666667}
      {12.5, 13.5, 0.00574}
      {13.5, 14.5, 0.000953333333333}
      {14.5, 15.5, 0.000936666666667}
      {15.5, 16.5, 0.000996666666667}
      {16.5, 17.5, 0.000948333333333}
      {17.5, 18.5, 0.000996666666667}
      {18.5, 19.5, 0.000965}
      {19.5, 20.5, 0.00099}
      {20.5, 21.5, 0.000763333333333}
      {21.5, 22.5, 0.000828333333333}
      {22.5, 23.5, 0.00102}
      {23.5, 24.5, 0.00106}
      {24.5, 25.5, 0.00108}
      {25.5, 26.5, 0.000566666666667}
      {26.5, 27.5, 0.000571666666667}
      {27.5, 28.5, 0.000473333333333}
      {28.5, 29.5, 0.00044}
    argunit = 1
    fununit = m^3/s
  exp_pc_in: Piecewise "Experimental cathode inlet pressure"
    arg = case_idx
    pieces = 
      {0.5, 1.5, 40}
      {1.5, 2.5, 54.9}
      {2.5, 3.5, 60}
      {3.5, 4.5, 70.1}
      {4.5, 5.5, 90}
      {5.5, 6.5, 100}
      {6.5, 7.5, 120}
      {7.5, 8.5, 140}
      {8.5, 9.5, 150}
      {9.5, 10.5, 149.9}
      {10.5, 11.5, 150.1}
      {11.5, 12.5, 149.9}
      {12.5, 13.5, 150}
      {13.5, 14.5, 39.68}
      {14.5, 15.5, 39.76}
      {15.5, 16.5, 40.08}
      {16.5, 17.5, 39.51}
      {17.5, 18.5, 39.6}
      {18.5, 19.5, 39.51}
      {19.5, 20.5, 39.44}
      {20.5, 21.5, 40.72}
      {21.5, 22.5, 41.36}
      {22.5, 23.5, 40.96}
      {23.5, 24.5, 41.2}
      {24.5, 25.5, 41.29}
      {25.5, 26.5, 40.56}
      {26.5, 27.5, 41.04}
      {27.5, 28.5, 32.22}
      {28.5, 29.5, 33.59}
    argunit = 1
    fununit = kPa
  exp_tc_in: Piecewise "Experimental cathode inlet temperature"
    arg = case_idx
    pieces = 
      {0.5, 1.5, 332.05}
      {1.5, 2.5, 334.35}
      {2.5, 3.5, 335.45}
      {3.5, 4.5, 336.95}
      {4.5, 5.5, 341.75}
      {5.5, 6.5, 345.35}
      {6.5, 7.5, 347.35}
      {7.5, 8.5, 347.65}
      {8.5, 9.5, 347.45}
      {9.5, 10.5, 348.25}
      {10.5, 11.5, 348.25}
      {11.5, 12.5, 348.45}
      {12.5, 13.5, 348.75}
      {13.5, 14.5, 323.27}
      {14.5, 15.5, 324.87}
      {15.5, 16.5, 325.93}
      {16.5, 17.5, 326.06}
      {17.5, 18.5, 326.27}
      {18.5, 19.5, 326.31}
      {19.5, 20.5, 326.46}
      {20.5, 21.5, 325.84}
      {21.5, 22.5, 325.84}
      {22.5, 23.5, 326.37}
      {23.5, 24.5, 326.49}
      {24.5, 25.5, 326.74}
      {25.5, 26.5, 325.27}
      {26.5, 27.5, 324.81}
      {27.5, 28.5, 321.84}
      {28.5, 29.5, 322.71}
    argunit = 1
    fununit = K
  exp_rhc_in: Piecewise "Experimental cathode inlet RH"
    arg = case_idx
    pieces = 
      {0.5, 1.5, 0.8}
      {1.5, 2.5, 0.6}
      {2.5, 3.5, 0.6}
      {3.5, 4.5, 0.6}
      {4.5, 5.5, 0.6}
      {5.5, 6.5, 0.6}
      {6.5, 7.5, 0.6}
      {7.5, 8.5, 0.6}
      {8.5, 9.5, 0.5}
      {9.5, 10.5, 0.45}
      {10.5, 11.5, 0.4}
      {11.5, 12.5, 0.4}
      {12.5, 13.5, 0.4}
      {13.5, 14.5, 0.556}
      {14.5, 15.5, 0.512}
      {15.5, 16.5, 0.5004}
      {16.5, 17.5, 0.5565}
      {17.5, 18.5, 0.616}
      {18.5, 19.5, 0.68}
      {19.5, 20.5, 0.732}
      {20.5, 21.5, 0.492}
      {21.5, 22.5, 0.492}
      {22.5, 23.5, 0.504}
      {23.5, 24.5, 0.504}
      {24.5, 25.5, 0.512}
      {25.5, 26.5, 0.496}
      {26.5, 27.5, 0.524}
      {27.5, 28.5, 0.82}
      {28.5, 29.5, 0.828}
    argunit = 1
    fununit = 1
  exp_pc_out: Piecewise "Experimental cathode outlet pressure"
    arg = case_idx
    pieces = 
      {0.5, 1.5, 32.5}
      {1.5, 2.5, 44.6}
      {2.5, 3.5, 46.1}
      {3.5, 4.5, 56.2}
      {4.5, 5.5, 73.5}
      {5.5, 6.5, 82}
      {6.5, 7.5, 98.9}
      {7.5, 8.5, 114.9}
      {8.5, 9.5, 119.9}
      {9.5, 10.5, 112.5}
      {10.5, 11.5, 104.4}
      {11.5, 12.5, 99.9}
      {12.5, 13.5, 94.7}
      {13.5, 14.5, 32.99}
      {14.5, 15.5, 32.84}
      {15.5, 16.5, 32.59}
      {16.5, 17.5, 32.52}
      {17.5, 18.5, 32.43}
      {18.5, 19.5, 32.27}
      {19.5, 20.5, 32.11}
      {20.5, 21.5, 34.6}
      {21.5, 22.5, 34.68}
      {22.5, 23.5, 33.08}
      {23.5, 24.5, 32.84}
      {24.5, 25.5, 32.75}
      {25.5, 26.5, 36.21}
      {26.5, 27.5, 36.45}
      {27.5, 28.5, 28.95}
      {28.5, 29.5, 29.25}
    argunit = 1
    fununit = kPa
  exp_tc_out: Piecewise "Experimental cathode outlet temperature"
    arg = case_idx
    pieces = 
      {0.5, 1.5, 329.15}
      {1.5, 2.5, 335.45}
      {2.5, 3.5, 337.55}
      {3.5, 4.5, 340.65}
      {4.5, 5.5, 346.85}
      {5.5, 6.5, 350.25}
      {6.5, 7.5, 353.65}
      {7.5, 8.5, 354.95}
      {8.5, 9.5, 355.75}
      {9.5, 10.5, 356.25}
      {10.5, 11.5, 356.15}
      {11.5, 12.5, 356.35}
      {12.5, 13.5, 356.55}
      {13.5, 14.5, 325.31}
      {14.5, 15.5, 326.21}
      {15.5, 16.5, 325.28}
      {16.5, 17.5, 326.43}
      {17.5, 18.5, 326.59}
      {18.5, 19.5, 326.81}
      {19.5, 20.5, 326.96}
      {20.5, 21.5, 326.21}
      {21.5, 22.5, 325.84}
      {22.5, 23.5, 327.18}
      {23.5, 24.5, 327.12}
      {24.5, 25.5, 326.9}
      {25.5, 26.5, 325.18}
      {26.5, 27.5, 325.24}
      {27.5, 28.5, 321.84}
      {28.5, 29.5, 322.71}
    argunit = 1
    fununit = K
  exp_dpc: Piecewise "Experimental cathode pressure drop"
    arg = case_idx
    pieces = 
      {0.5, 1.5, 7.5}
      {1.5, 2.5, 10.3}
      {2.5, 3.5, 13.9}
      {3.5, 4.5, 13.9}
      {4.5, 5.5, 16.5}
      {5.5, 6.5, 18}
      {6.5, 7.5, 21.1}
      {7.5, 8.5, 25.1}
      {8.5, 9.5, 30.1}
      {9.5, 10.5, 37.4}
      {10.5, 11.5, 45.7}
      {11.5, 12.5, 50}
      {12.5, 13.5, 55.3}
      {13.5, 14.5, 6.69}
      {14.5, 15.5, 6.92}
      {15.5, 16.5, 7.49}
      {16.5, 17.5, 6.99}
      {17.5, 18.5, 7.17}
      {18.5, 19.5, 7.24}
      {19.5, 20.5, 7.33}
      {20.5, 21.5, 6.12}
      {21.5, 22.5, 6.68}
      {22.5, 23.5, 7.88}
      {23.5, 24.5, 8.36}
      {24.5, 25.5, 8.54}
      {25.5, 26.5, 4.35}
      {26.5, 27.5, 4.59}
      {27.5, 28.5, 3.27}
      {28.5, 29.5, 4.34}
    argunit = 1
    fununit = kPa
  exp_pa_in: Piecewise "Experimental anode inlet pressure"
    arg = case_idx
    pieces = 
      {0.5, 1.5, 47.8}
      {1.5, 2.5, 66.7}
      {2.5, 3.5, 80}
      {3.5, 4.5, 90.1}
      {4.5, 5.5, 109.6}
      {5.5, 6.5, 121}
      {6.5, 7.5, 139.4}
      {7.5, 8.5, 159.9}
      {8.5, 9.5, 169.9}
      {9.5, 10.5, 170.2}
      {10.5, 11.5, 170.1}
      {11.5, 12.5, 170.1}
      {12.5, 13.5, 169.8}
      {13.5, 14.5, 47.8}
      {14.5, 15.5, 47.8}
      {15.5, 16.5, 47.8}
      {16.5, 17.5, 47.8}
      {17.5, 18.5, 47.8}
      {18.5, 19.5, 47.8}
      {19.5, 20.5, 47.8}
      {20.5, 21.5, 47.8}
      {21.5, 22.5, 47.8}
      {22.5, 23.5, 47.8}
      {23.5, 24.5, 47.8}
      {24.5, 25.5, 47.8}
      {25.5, 26.5, 47.8}
      {26.5, 27.5, 47.8}
      {27.5, 28.5, 47.8}
      {28.5, 29.5, 47.8}
    argunit = 1
    fununit = kPa
  exp_ta_in: Piecewise "Experimental anode inlet temperature"
    arg = case_idx
    pieces = 
      {0.5, 1.5, 331.35}
      {1.5, 2.5, 333.45}
      {2.5, 3.5, 334.55}
      {3.5, 4.5, 337.25}
      {4.5, 5.5, 343.05}
      {5.5, 6.5, 346.75}
      {6.5, 7.5, 348.75}
      {7.5, 8.5, 348.75}
      {8.5, 9.5, 348.35}
      {9.5, 10.5, 347.75}
      {10.5, 11.5, 348.25}
      {11.5, 12.5, 348.45}
      {12.5, 13.5, 348.35}
      {13.5, 14.5, 331.35}
      {14.5, 15.5, 331.35}
      {15.5, 16.5, 331.35}
      {16.5, 17.5, 331.35}
      {17.5, 18.5, 331.35}
      {18.5, 19.5, 331.35}
      {19.5, 20.5, 331.35}
      {20.5, 21.5, 331.35}
      {21.5, 22.5, 331.35}
      {22.5, 23.5, 331.35}
      {23.5, 24.5, 331.35}
      {24.5, 25.5, 331.35}
      {25.5, 26.5, 331.35}
      {26.5, 27.5, 331.35}
      {27.5, 28.5, 331.35}
      {28.5, 29.5, 331.35}
    argunit = 1
    fununit = K
  exp_rha_in: Piecewise "Experimental anode inlet RH"
    arg = case_idx
    pieces = 
      {0.5, 1.5, 0.3}
      {1.5, 2.5, 0.3}
      {2.5, 3.5, 0.3}
      {3.5, 4.5, 0.3}
      {4.5, 5.5, 0.3}
      {5.5, 6.5, 0.3}
      {6.5, 7.5, 0.3}
      {7.5, 8.5, 0.3}
      {8.5, 9.5, 0.3}
      {9.5, 10.5, 0.3}
      {10.5, 11.5, 0.3}
      {11.5, 12.5, 0.3}
      {12.5, 13.5, 0.3}
      {13.5, 14.5, 0.3}
      {14.5, 15.5, 0.3}
      {15.5, 16.5, 0.3}
      {16.5, 17.5, 0.3}
      {17.5, 18.5, 0.3}
      {18.5, 19.5, 0.3}
      {19.5, 20.5, 0.3}
      {20.5, 21.5, 0.3}
      {21.5, 22.5, 0.3}
      {22.5, 23.5, 0.3}
      {23.5, 24.5, 0.3}
      {24.5, 25.5, 0.3}
      {25.5, 26.5, 0.3}
      {26.5, 27.5, 0.3}
      {27.5, 28.5, 0.3}
      {28.5, 29.5, 0.3}
    argunit = 1
    fununit = 1
  exp_pa_out: Piecewise "Experimental anode outlet pressure"
    arg = case_idx
    pieces = 
      {0.5, 1.5, 43.4}
      {1.5, 2.5, 60.9}
      {2.5, 3.5, 73.5}
      {3.5, 4.5, 82.7}
      {4.5, 5.5, 103.2}
      {5.5, 6.5, 114.2}
      {6.5, 7.5, 132.9}
      {7.5, 8.5, 152.9}
      {8.5, 9.5, 162.6}
      {9.5, 10.5, 161.8}
      {10.5, 11.5, 161}
      {11.5, 12.5, 160.8}
      {12.5, 13.5, 160.2}
      {13.5, 14.5, 43.4}
      {14.5, 15.5, 43.4}
      {15.5, 16.5, 43.4}
      {16.5, 17.5, 43.4}
      {17.5, 18.5, 43.4}
      {18.5, 19.5, 43.4}
      {19.5, 20.5, 43.4}
      {20.5, 21.5, 43.4}
      {21.5, 22.5, 43.4}
      {22.5, 23.5, 43.4}
      {23.5, 24.5, 43.4}
      {24.5, 25.5, 43.4}
      {25.5, 26.5, 43.4}
      {26.5, 27.5, 43.4}
      {27.5, 28.5, 43.4}
      {28.5, 29.5, 43.4}
    argunit = 1
    fununit = kPa
  exp_lama: Piecewise "Experimental anode stoichiometry"
    arg = case_idx
    pieces = 
      {0.5, 1.5, 5}
      {1.5, 2.5, 3}
      {2.5, 3.5, 2.7}
      {3.5, 4.5, 2.5}
      {4.5, 5.5, 2.1}
      {5.5, 6.5, 1.7}
      {6.5, 7.5, 1.5}
      {7.5, 8.5, 1.5}
      {8.5, 9.5, 1.5}
      {9.5, 10.5, 1.5}
      {10.5, 11.5, 1.5}
      {11.5, 12.5, 1.5}
      {12.5, 13.5, 1.5}
      {13.5, 14.5, 5}
      {14.5, 15.5, 5}
      {15.5, 16.5, 5}
      {16.5, 17.5, 5}
      {17.5, 18.5, 5}
      {18.5, 19.5, 5}
      {19.5, 20.5, 5}
      {20.5, 21.5, 5}
      {21.5, 22.5, 5}
      {22.5, 23.5, 5}
      {23.5, 24.5, 5}
      {24.5, 25.5, 5}
      {25.5, 26.5, 5}
      {26.5, 27.5, 5}
      {27.5, 28.5, 5}
      {28.5, 29.5, 5}
    argunit = 1
    fununit = 1
  exp_tcool_in: Piecewise "Experimental coolant inlet temperature"
    arg = case_idx
    pieces = 
      {0.5, 1.5, 334.75}
      {1.5, 2.5, 336.35}
      {2.5, 3.5, 337.55}
      {3.5, 4.5, 339.05}
      {4.5, 5.5, 343.45}
      {5.5, 6.5, 346.35}
      {6.5, 7.5, 347.65}
      {7.5, 8.5, 348.35}
      {8.5, 9.5, 349.05}
      {9.5, 10.5, 348.95}
      {10.5, 11.5, 349.05}
      {11.5, 12.5, 348.85}
      {12.5, 13.5, 348.95}
      {13.5, 14.5, 333.25}
      {14.5, 15.5, 333.85}
      {15.5, 16.5, 333.25}
      {16.5, 17.5, 333.15}
      {17.5, 18.5, 333.15}
      {18.5, 19.5, 333.25}
      {19.5, 20.5, 333.25}
      {20.5, 21.5, 333.35}
      {21.5, 22.5, 278.65}
      {22.5, 23.5, 278.65}
      {23.5, 24.5, 278.65}
      {24.5, 25.5, 278.65}
      {25.5, 26.5, 278.65}
      {26.5, 27.5, 278.65}
      {27.5, 28.5, 333.25}
      {28.5, 29.5, 333.25}
    argunit = 1
    fununit = K
  exp_tcool_out: Piecewise "Experimental coolant outlet temperature"
    arg = case_idx
    pieces = 
      {0.5, 1.5, 333.75}
      {1.5, 2.5, 337.75}
      {2.5, 3.5, 339.45}
      {3.5, 4.5, 342.45}
      {4.5, 5.5, 348.65}
      {5.5, 6.5, 352.35}
      {6.5, 7.5, 355.95}
      {7.5, 8.5, 356.95}
      {8.5, 9.5, 358.15}
      {9.5, 10.5, 358.55}
      {10.5, 11.5, 358.55}
      {11.5, 12.5, 358.15}
      {12.5, 13.5, 358.35}
      {13.5, 14.5, 333.25}
      {14.5, 15.5, 333.25}
      {15.5, 16.5, 333.35}
      {16.5, 17.5, 333.45}
      {17.5, 18.5, 333.35}
      {18.5, 19.5, 333.55}
      {19.5, 20.5, 333.45}
      {20.5, 21.5, 333.55}
      {21.5, 22.5, 278.65}
      {22.5, 23.5, 278.65}
      {23.5, 24.5, 278.65}
      {24.5, 25.5, 278.65}
      {25.5, 26.5, 278.65}
      {26.5, 27.5, 278.65}
      {27.5, 28.5, 333.25}
      {28.5, 29.5, 333.15}
    argunit = 1
    fununit = K
  exp_qcool: Piecewise "Experimental coolant volume flow"
    arg = case_idx
    pieces = 
      {0.5, 1.5, 9.16666666667e-05}
      {1.5, 2.5, 0.0001}
      {2.5, 3.5, 0.0001}
      {3.5, 4.5, 0.0001}
      {4.5, 5.5, 0.0001}
      {5.5, 6.5, 0.0001}
      {6.5, 7.5, 0.0001}
      {7.5, 8.5, 0.000108333333333}
      {8.5, 9.5, 0.000125}
      {9.5, 10.5, 0.000151666666667}
      {10.5, 11.5, 0.000166666666667}
      {11.5, 12.5, 0.000185}
      {12.5, 13.5, 0.000191666666667}
      {13.5, 14.5, 9.16666666667e-05}
      {14.5, 15.5, 9.16666666667e-05}
      {15.5, 16.5, 9.16666666667e-05}
      {16.5, 17.5, 9.16666666667e-05}
      {17.5, 18.5, 9.16666666667e-05}
      {18.5, 19.5, 9.16666666667e-05}
      {19.5, 20.5, 9.16666666667e-05}
      {20.5, 21.5, 9.16666666667e-05}
      {21.5, 22.5, 9.16666666667e-05}
      {22.5, 23.5, 9.16666666667e-05}
      {23.5, 24.5, 9.16666666667e-05}
      {24.5, 25.5, 9.16666666667e-05}
      {25.5, 26.5, 9.16666666667e-05}
      {26.5, 27.5, 9.16666666667e-05}
      {27.5, 28.5, 9.16666666667e-05}
      {28.5, 29.5, 9.16666666667e-05}
    argunit = 1
    fununit = m^3/s
  exp_egrp: Piecewise "Experimental EGR return pressure"
    funcname = exp_egr_return_p
    arg = case_idx
    pieces = 
      {0.5, 1.5, 32.5}
      {1.5, 2.5, 44.6}
      {2.5, 3.5, 46.1}
      {3.5, 4.5, 56.2}
      {4.5, 5.5, 73.5}
      {5.5, 6.5, 82}
      {6.5, 7.5, 98.9}
      {7.5, 8.5, 114.9}
      {8.5, 9.5, 119.9}
      {9.5, 10.5, 112.5}
      {10.5, 11.5, 104.4}
      {11.5, 12.5, 99.9}
      {12.5, 13.5, 94.7}
      {13.5, 14.5, 32.99}
      {14.5, 15.5, 29.47}
      {15.5, 16.5, 29.47}
      {16.5, 17.5, 28.69}
      {17.5, 18.5, 29.03}
      {18.5, 19.5, 29.03}
      {19.5, 20.5, 29.03}
      {20.5, 21.5, 34.6}
      {21.5, 22.5, 30.79}
      {22.5, 23.5, 31.14}
      {23.5, 24.5, 31.22}
      {24.5, 25.5, 31.22}
      {25.5, 26.5, 36.21}
      {26.5, 27.5, 30.79}
      {27.5, 28.5, 24.53}
      {28.5, 29.5, 29.25}
    argunit = 1
    fununit = kPa
  exp_egrt: Piecewise "Experimental EGR return temperature"
    funcname = exp_egr_return_t
    arg = case_idx
    pieces = 
      {0.5, 1.5, 329.15}
      {1.5, 2.5, 335.45}
      {2.5, 3.5, 337.55}
      {3.5, 4.5, 340.65}
      {4.5, 5.5, 346.85}
      {5.5, 6.5, 350.25}
      {6.5, 7.5, 353.65}
      {7.5, 8.5, 354.95}
      {8.5, 9.5, 355.75}
      {9.5, 10.5, 356.25}
      {10.5, 11.5, 356.15}
      {11.5, 12.5, 356.35}
      {12.5, 13.5, 356.55}
      {13.5, 14.5, 325.31}
      {14.5, 15.5, 317.01}
      {15.5, 16.5, 317.01}
      {16.5, 17.5, 318.99}
      {17.5, 18.5, 320.37}
      {18.5, 19.5, 321.54}
      {19.5, 20.5, 322}
      {20.5, 21.5, 326.21}
      {21.5, 22.5, 315.43}
      {22.5, 23.5, 318.09}
      {23.5, 24.5, 318.66}
      {24.5, 25.5, 319.81}
      {25.5, 26.5, 325.18}
      {26.5, 27.5, 315.43}
      {27.5, 28.5, 313.51}
      {28.5, 29.5, 322.71}
    argunit = 1
    fununit = K
  exp_egrrh: Piecewise "Experimental EGR return RH"
    funcname = exp_egr_return_rh
    arg = case_idx
    pieces = 
      {0.5, 1.5, 1}
      {1.5, 2.5, 1}
      {2.5, 3.5, 1}
      {3.5, 4.5, 1}
      {4.5, 5.5, 1}
      {5.5, 6.5, 1}
      {6.5, 7.5, 1}
      {7.5, 8.5, 1}
      {8.5, 9.5, 1}
      {9.5, 10.5, 1}
      {10.5, 11.5, 1}
      {11.5, 12.5, 1}
      {12.5, 13.5, 1}
      {13.5, 14.5, 1}
      {14.5, 15.5, 1}
      {15.5, 16.5, 1}
      {16.5, 17.5, 1}
      {17.5, 18.5, 1}
      {18.5, 19.5, 1}
      {19.5, 20.5, 1}
      {20.5, 21.5, 1}
      {21.5, 22.5, 1}
      {22.5, 23.5, 0.8071}
      {23.5, 24.5, 0.766}
      {24.5, 25.5, 0.74}
      {25.5, 26.5, 1}
      {26.5, 27.5, 1}
      {27.5, 28.5, 1}
      {28.5, 29.5, 1}
    argunit = 1
    fununit = 1
  exp_lamc: Piecewise "Experimental effective cathode oxygen stoichiometry"
    arg = case_idx
    pieces = 
      {0.5, 1.5, 57.139894301}
      {1.5, 2.5, 47.99855469}
      {2.5, 3.5, 40.5082389138}
      {3.5, 4.5, 33.0602395394}
      {4.5, 5.5, 27.6405100522}
      {5.5, 6.5, 25.9704178369}
      {6.5, 7.5, 25.1506077827}
      {7.5, 8.5, 25.6621876193}
      {8.5, 9.5, 26.3407680141}
      {9.5, 10.5, 26.5410719113}
      {10.5, 11.5, 26.8810467038}
      {11.5, 12.5, 26.7986730066}
      {12.5, 13.5, 26.7805878841}
      {13.5, 14.5, 80.1795295576}
      {14.5, 15.5, 78.8437923642}
      {15.5, 16.5, 83.6501995781}
      {16.5, 17.5, 78.036031512}
      {17.5, 18.5, 80.3934482291}
      {18.5, 19.5, 76.1648968647}
      {19.5, 20.5, 76.5967966178}
      {20.5, 21.5, 64.4002498242}
      {21.5, 22.5, 70.0316932839}
      {22.5, 23.5, 85.5255910123}
      {23.5, 24.5, 88.8801358993}
      {24.5, 25.5, 90.2168229232}
      {25.5, 26.5, 47.9093782553}
      {26.5, 27.5, 48.1963228002}
      {27.5, 28.5, 71.4773256812}
      {28.5, 29.5, 66.2235140749}
    argunit = 1
    fununit = 1

Variables
  var75 "全局变量+阴极尾气循环"
    T_fc = T_fc_init  // Temperature passed to fuel-cell material/transport inputs
    W_c_out = W_c_O2_out+W_c_N2_out+W_c_H2O_out
    W_c_cyc = alpha_cyc*W_c_out  // 循环流量
    W_c_O2_cyc = W_c_cyc*Y_c_O2_out  // 循环中的氧气流量
    W_c_N2_cyc = W_c_cyc*Y_c_N2_out  // 循环中的氮气流量
    W_c_H2O_cyc = W_c_cyc*Y_c_H2O_out  // 循环中的水蒸气流量
    W_c_in_amb = W_c_in-W_c_cyc  // 进入电堆的流量不变，加湿空气进入的流量减少
    W_c_O2_in_amb = W_c_in_amb*Y_c_O2_in  // 进入的加湿空气中氧气流量
    W_c_N2_in_amb = W_c_in_amb*Y_c_N2_in  // 进入的加湿空气中氮气流量
    W_c_H2O_in_amb = W_c_in_amb*Y_c_v_in  // 进入的加湿空气中水蒸气流量
    Y_c_O2_in_mix = (W_c_O2_cyc+W_c_O2_in_amb)/W_c_in  // 带循环的电堆入口氧气质量分数
    Y_c_N2_in_mix = (W_c_N2_cyc+W_c_N2_in_amb)/W_c_in  // 带循环的电堆入口氮气质量分数
    Y_c_H2O_in_mix = (W_c_H2O_cyc+W_c_H2O_in_amb)/W_c_in  // 带循环的电堆入口水蒸气质量分数
    x_c_O2_in_mix = Y_c_O2_in_mix/M_O2/(Y_c_O2_in_mix/M_O2+Y_c_N2_in_mix/M_N2+Y_c_H2O_in_mix/M_H2O)  // 带循环的电堆入口氧气摩尔分数
    x_c_N2_in_mix = Y_c_N2_in_mix/M_N2/(Y_c_O2_in_mix/M_O2+Y_c_N2_in_mix/M_N2+Y_c_H2O_in_mix/M_H2O)  // 带循环的电堆入口氮气摩尔分数
    x_c_H2O_in_mix = Y_c_H2O_in_mix/M_H2O/(Y_c_O2_in_mix/M_O2+Y_c_N2_in_mix/M_N2+Y_c_H2O_in_mix/M_H2O)  // 带循环的电堆入口水蒸气摩尔分数
    I_stack = I_fc*A_cell  // Single-cell current implied by the MEA model
    V_cell_exp = exp_vcell(case_idx)  // Measured cell voltage for calibration residuals
    T_cool_in_exp = exp_tcool_in(case_idx)  // Coolant inlet temperature
    T_cool_out_exp = exp_tcool_out(case_idx)  // Coolant outlet temperature
    T_cell_exp = 0.5*(T_cool_in_exp+T_cool_out_exp)  // Bench cell-temperature proxy from coolant
    mdot_cool_exp = rho_coolant*exp_qcool(case_idx)  // Coolant mass flow
    Q_cool_exp = mdot_cool_exp*Cp_coolant_lumped*(T_cool_out_exp-T_cool_in_exp)  // Measured coolant heat removal for residual/audit
    Q_heat_stack = eta_heat_fit*N_cell*I_stack*(E_tn_cell-V_cell_model_for_heat)  // Full-stack fuel-cell heat generation
    T_stack_0d = T_fc_init  // Compatibility alias for older result expressions
    thermal_residual = T_stack_lumped-T_cell_exp  // Model stack temperature minus measured cell/coolant proxy
    lambda_c_eff = W_c_O2_in/W_c_O2_reacted  // Effective cathode oxygen stoichiometry from measured inlet flow
    dp_c_exp = exp_dpc(case_idx)  // Measured cathode pressure drop
    p_c_return_exp = exp_egr_return_p(case_idx)  // Measured or completed EGR return pressure
    T_c_return_exp = exp_egr_return_t(case_idx)  // Measured or completed EGR return temperature
    RH_c_return_exp = exp_egr_return_rh(case_idx)  // Measured or completed EGR return RH
    V_cell_model_for_heat = V_cell_exp  // Voltage used in heat source; replace by solved voltage after voltage expression is finalized
    Q_cool_model = UA_cool_stack*(T_stack_lumped-T_cool_in_exp)  // Empirical coolant heat rejection model
    Q_amb_model = UA_amb_stack*(T_stack_lumped-T_amb_model)  // Ambient heat loss model
    thermal_balance_residual = Q_heat_stack-Q_cool_model-Q_amb_model  // Lumped thermal balance residual
    coolant_heat_residual = Q_cool_model-Q_cool_exp  // Model-minus-measured coolant heat residual
    dp_c_model = p_c_in_bavg-p_c_out_bavg  // Cathode pressure drop from retained boundary probes
    dp_c_residual = dp_c_model-exp_dpc(case_idx)  // Pressure-drop fit residual
    p_c_in_residual = p_c_in_bavg-p_c_in  // Model minus cathode inlet pressure boundary
    p_c_out_residual = p_c_out_bavg-p_c_out  // Model minus cathode outlet pressure boundary
    W_c_in_stack_check = N_cell*W_c_in  // Stack-scale inlet flow reconstructed from per-cell model boundary
    W_c_in_stack_residual = W_c_in_stack_check-W_c_stack_in  // Single-MEA to stack flow scaling residual
    T_stack_residual = T_stack_lumped-T_cell_exp  // Lumped thermal fit residual
    Q_cool_residual = Q_cool_model-Q_cool_exp  // Coolant heat fit residual
  var74 "膜" on domains 3
    lambda_H2O_mem = lambda_H2O_eq(fc.aw)
    sigmal_mem = (0.5139*lambda_H2O_mem-0.326)[S/m]*exp(1268*(1/303.15-1[K]/T_fc_init))
  var76 "MPLGDL" on domains 2, 4
    a_v_ce = fc.pH2O/fc.p_vap  // 水蒸气活度
    drh_ce = a_v_ce-1  // 相对饱和偏差
    pos_drh_ce = 0.5*(drh_ce+sqrt(drh_ce^2+eps_rh^2))  // 平滑后的正偏差冷凝驱动力
    neg_drh_ce = 0.5*(-drh_ce+sqrt(drh_ce^2+eps_rh^2))  // 平滑后的负偏差蒸发驱动力
    f_gas_ce = 1  // No explicit two-phase saturation state retained
    f_liq_ce = 1  // No explicit two-phase saturation state retained
    r_ce_user = k_cond*pos_drh_ce-k_evap*neg_drh_ce  // Algebraic condensation-evaporation rate retained without two-phase transport
  var77 "流道" on domains 1, 5

Probes
  mid_c_in_p: Boundary "Intermediate | Cathode inlet pressure boundary average" on boundaries 16
    probename = p_c_in_bavg
    expr = fc.pA
    unit = kPa
    descr = Boundary pressure used to form cathode pressure-drop objective
    frame = material
    table = tbl_fit_intermediate
  mid_c_out_p: Boundary "Intermediate | Cathode outlet pressure boundary average" on boundaries 9
    probename = p_c_out_bavg
    expr = fc.pA
    unit = kPa
    descr = Boundary pressure used to form cathode pressure-drop objective
    frame = material
    table = tbl_fit_intermediate
  mid_c_out_yo2: Boundary "Intermediate | Cathode outlet O2 mass fraction" on boundaries 9
    probename = Y_c_O2_out
    expr = fc.wO2
    unit = 1
    descr = Intermediate | Cathode outlet O2 mass fraction
    frame = material
    table = tbl_fit_intermediate
  mid_c_out_yn2: Boundary "Intermediate | Cathode outlet N2 mass fraction" on boundaries 9
    probename = Y_c_N2_out
    expr = fc.wN2
    unit = 1
    descr = Intermediate | Cathode outlet N2 mass fraction
    frame = material
    table = tbl_fit_intermediate
  mid_c_out_yh2o: Boundary "Intermediate | Cathode outlet H2O mass fraction" on boundaries 9
    probename = Y_c_H2O_out
    expr = fc.wH2O
    unit = 1
    descr = Intermediate | Cathode outlet H2O mass fraction
    frame = material
    table = tbl_fit_intermediate
  mid_c_out_yo3: Boundary "Intermediate | Cathode outlet O2 flux" on boundaries 9
    probename = W_c_O2_out
    expr = fc.tfluxMagO2*L_CH*W_cell
    unit = kg/s
    descr = Intermediate | Cathode outlet O2 flux
    frame = material
    table = tbl_fit_intermediate
  mid_c_out_yo4: Boundary "Intermediate | Cathode outlet N2 flux" on boundaries 9
    probename = W_c_N2_out
    expr = fc.tfluxMagN2*L_CH*W_cell
    unit = kg/s
    descr = Intermediate | Cathode outlet N2 flux
    frame = material
    table = tbl_fit_intermediate
  mid_c_out_yo5: Boundary "Intermediate | Cathode outlet H2O flux" on boundaries 9
    probename = W_c_H2O_out
    expr = fc.tfluxMagH2O*L_CH*W_cell
    unit = kg/s
    descr = Intermediate | Cathode outlet H2O flux
    frame = material
    table = tbl_fit_intermediate
  mid_a_in_p: Boundary "Intermediate | Anode inlet pressure boundary average" on boundaries 1
    probename = p_a_in_bavg
    expr = fc.pA
    unit = kPa
    descr = Intermediate | Anode inlet pressure boundary average
    frame = material
    table = tbl_fit_intermediate
  mid_a_out_p: Boundary "Intermediate | Anode outlet pressure boundary average" on boundaries 12
    probename = p_a_out_bavg
    expr = fc.pA
    unit = kPa
    descr = Intermediate | Anode outlet pressure boundary average
    frame = material
    table = tbl_fit_intermediate
  mid_case: GlobalVariable "Intermediate | Case index"
    probename = case_idx_probe
    expr = case_idx
    unit = 1
    descr = Intermediate | Case index
    table = tbl_fit_intermediate
  mid_w_c_stack_in: GlobalVariable "Intermediate | Cathode inlet flow measured stack"
    probename = W_c_stack_in_probe
    expr = W_c_stack_in
    unit = kg/s
    descr = Intermediate | Cathode inlet flow measured stack
    table = tbl_fit_intermediate
  mid_w_c_cell_in: GlobalVariable "Intermediate | Cathode inlet flow per cell"
    probename = W_c_in_per_cell_probe
    expr = W_c_in
    unit = kg/s
    descr = Intermediate | Cathode inlet flow per cell
    table = tbl_fit_intermediate
  mid_w_c_stack_check: GlobalVariable "Intermediate | Reconstructed stack inlet flow"
    probename = W_c_in_stack_check_probe
    expr = N_cell*W_c_in
    unit = kg/s
    descr = Intermediate | Reconstructed stack inlet flow
    table = tbl_fit_intermediate
  mid_w_c_stack_res: GlobalVariable "Intermediate | Stack inlet flow scaling residual"
    probename = W_c_in_stack_residual_probe
    expr = N_cell*W_c_in-W_c_stack_in
    unit = kg/s
    descr = Intermediate | Stack inlet flow scaling residual
    table = tbl_fit_intermediate
  mid_lamc: GlobalVariable "Intermediate | Cathode oxygen stoichiometry per cell"
    probename = lambda_c_model
    expr = lam_c
    unit = 1
    descr = Intermediate | Cathode oxygen stoichiometry per cell
    table = tbl_fit_intermediate
  mid_alpha: GlobalVariable "Intermediate | Cathode exhaust recycle fraction"
    probename = alpha_cyc_probe
    expr = alpha_cyc
    unit = 1
    descr = Intermediate | Cathode exhaust recycle fraction
    table = tbl_fit_intermediate
  out_pO2_avg: Domain "KeyOutput | Cathode O2 partial pressure average" on domains 4, 5
    probename = pO2_c_dom_avg
    expr = fc.pO2
    unit = kPa
    descr = KeyOutput | Cathode O2 partial pressure average
    frame = material
    table = tbl_fit_key_output
  out_rh_avg: Domain "KeyOutput | Cathode RH average" on domains 4, 5
    probename = RH_c_dom_avg
    expr = fc.RH
    unit = 1
    descr = KeyOutput | Cathode RH average
    frame = material
    table = tbl_fit_key_output
  out_mem_lambda: Domain "KeyOutput | Membrane water content average" on domains 3
    probename = lambda_mem_avg
    expr = lambda_H2O_mem
    unit = 1
    descr = KeyOutput | Membrane water content average
    frame = material
    table = tbl_fit_key_output
  out_cond_int: Domain "KeyOutput | Condensation evaporation integrated source per cell" on domains 4, 5
    type = integral
    probename = R_ce_int_per_cell
    expr = r_ce_user*W_cell
    unit = mol/s
    descr = KeyOutput | Condensation evaporation integrated source per cell
    frame = material
    table = tbl_fit_key_output
  obj_dp_model: GlobalVariable "Objective | Cathode pressure drop model"
    probename = dp_c_model_probe
    expr = p_c_in_bavg-p_c_out_bavg
    unit = kPa
    descr = Objective | Cathode pressure drop model
    table = tbl_fit_objective
  obj_dp_exp: GlobalVariable "Objective | Cathode pressure drop experiment"
    probename = dp_c_exp_probe
    expr = exp_dpc(case_idx)
    unit = kPa
    descr = Objective | Cathode pressure drop experiment
    table = tbl_fit_objective
  obj_dp_res: GlobalVariable "Objective | Cathode pressure drop residual"
    probename = dp_c_residual_probe
    expr = p_c_in_bavg-p_c_out_bavg-exp_dpc(case_idx)
    unit = kPa
    descr = Objective | Cathode pressure drop residual
    table = tbl_fit_objective
  obj_t_model: GlobalVariable "Objective | Lumped stack temperature model"
    probename = T_stack_lumped_probe
    expr = T_stack_lumped
    unit = K
    descr = Objective | Lumped stack temperature model
    table = tbl_fit_objective
  obj_t_exp: GlobalVariable "Objective | Measured temperature proxy"
    probename = T_cell_exp_probe
    expr = T_cell_exp
    unit = K
    descr = Objective | Measured temperature proxy
    table = tbl_fit_objective
  obj_t_res: GlobalVariable "Objective | Lumped stack temperature residual"
    probename = T_stack_residual_probe
    expr = T_stack_lumped-T_cell_exp
    unit = K
    descr = Objective | Lumped stack temperature residual
    table = tbl_fit_objective
  obj_q_model: GlobalVariable "Objective | Coolant heat rejection model"
    probename = Q_cool_model_probe
    expr = Q_cool_model
    unit = W
    descr = Objective | Coolant heat rejection model
    table = tbl_fit_objective
  obj_q_exp: GlobalVariable "Objective | Coolant heat removal experiment"
    probename = Q_cool_exp_probe
    expr = Q_cool_exp
    unit = W
    descr = Objective | Coolant heat removal experiment
    table = tbl_fit_objective
  obj_q_res: GlobalVariable "Objective | Coolant heat residual"
    probename = Q_cool_residual_probe
    expr = Q_cool_model-Q_cool_exp
    unit = W
    descr = Objective | Coolant heat residual
    table = tbl_fit_objective
  obj_v_exp: GlobalVariable "Objective | Experimental cell voltage"
    probename = V_cell_exp_probe
    expr = V_cell_exp
    unit = V
    descr = Objective | Experimental cell voltage
    table = tbl_fit_objective

Geometry
  geom1 "几何 1" (2D, length unit m)
    r2: Rectangle "L_aCH" | size = {L_cell, L_CH}
    r3: Rectangle "L_aGDL" | size = {L_cell, L_GDL}; pos = {0, L_CH}
    r4: Rectangle "L_PEM" | size = {L_cell, L_PEM}; pos = {0, L_CH+L_GDL}
    r5: Rectangle "L_cGDL" | size = {L_cell, L_GDL}; pos = {0, L_CH+L_GDL+L_PEM}
    r6: Rectangle "L_cCH" | size = {L_cell, L_CH}; pos = {0, L_CH+L_GDL+L_PEM+L_GDL}
    fin: Finalize "形成联合体"

Materials
  mat1: Common "Nafion®, EW 1100, Vapor Equilibrated, Protonated" on domains 3
    def: def "Basic"
      thermalconductivity = (0.177+3.7e-3*lambda)[W/m/K]
      lambda = pewt.lambda
    ElectrolyteConductivity: ElectrolyteConductivity
      sigmal = sigma_vs_T_and_RH((T-0[degC])[1/K],min(max(phi,0.1),1))
      int1: Interpolation
        importedname = nafion_1100_conductivity_vapor_eq.csv
        funcnametable = {sigma_vs_T_and_RH, 1}
        source = file
        filecolumns = 3
        columnKeys = {col1, col2, col3}
        columnType = {col1, arg, col2, arg, col3, value}
        funcnames = {col1, int1, col2, int1, col3, sigma_vs_T_and_RH}
        fununit = S/cm
        argunit = {1, 1}
    MembraneCrossover: MembraneCrossover
      Psi_H2 = (2.2e-11*f+2.9e-12)[mol/cm/s/bar]*exp(21[kJ/mol]/R_const*(1/30[degC]-1/T))
      Psi_O2 = (1.9e-11*f+1.1e-12)[mol/cm/s/bar]*exp(22[kJ/mol]/R_const*(1/30[degC]-1/T))
      Psi_N2 = Psi_O2
      lambda = pewt.lambda
      DESCR_PREFIX:lambda = Water uptake
      EW = 1100[g/mol]
      DESCR_PREFIX:EW = Polymer electrolyte equivalent weight
      Vm = EW/2[g/cm^3]
      DESCR_PREFIX:Vm = Partial molar volume of dry polymer
      V0 = 18[g/mol]/1000[kg/m^3]
      DESCR_PREFIX:V0 = Water partial molar volume
      f = lambda*V0/(Vm+lambda*V0)
      DESCR_PREFIX:f = Water volume fraction in polymer
    PolymerElectrolyteWaterTransport: PolymerElectrolyteWaterTransport
      alpha = max(c0*Dmu/(R_const*T*(1-x0)),1e-9)
      xi = if(lambda>1,1,lambda)
      lambda = lambda(phi)
      DESCR_PREFIX:lambda = Water uptake
      EW = 1100[g/mol]
      DESCR_PREFIX:EW = Polymer electrolyte equivalent weight
      Vm = EW/2[g/cm^3]
      DESCR_PREFIX:Vm = Partial molar volume of dry polymer
      V0 = 18[g/mol]/1000[kg/m^3]
      DESCR_PREFIX:V0 = Water partial molar volume
      f = lambda*V0/(Vm+lambda*V0)
      DESCR_PREFIX:f = Water volume fraction in polymer
      Dmu = 1.8e-5[cm^2/s]*f*exp(20[kJ/mol]/R_const*(1/30[degC]-1/T))
      DESCR_PREFIX:Dmu = Water diffusion coefficient
      c0 = lambda/(V0*lambda+Vm)
      DESCR_PREFIX:c0 = Water concentration
      x0 = lambda/(lambda+1)
      DESCR_PREFIX:x0 = Water mole fraction
      int1: Interpolation
        funcnametable = {int1, 1}
        funcname = lambda
        table = {{0.00, 0.0}, {0.14, 1.9}, {0.37, 2.9}, {0.45, 3.1}, {0.51, 3.7}, {0.57, 4.3}, {0.79, 6.3}, {0.80, 6.8}, {0.81, 7.9}, {0.88, 10.0}, {0.91, 12.0}, {0.96, 13.2}, {1.00, 14.0}}
        fununit = 1
        argunit = 1
    PolymerElectrolyteWaterAbsorptionDesorption: PolymerElectrolyteWaterAbsorptionDesorption
      k_abs_dsp = 1.04e-7*exp(4.48*max(min(phi,0.85),0.25))[mol/cm^2/s]

Physics
  fc: HydrogenFuelCell "氢燃料电池" on all domains
    dependent variable electricpotentialionicphase
    H2GasMixture.H2O = 1
    H2GasMixture.GasPhaseDiffusion = 1
    O2GasMixture.H2O = 1
    O2GasMixture.N2 = 1
    O2GasMixture.GasPhaseDiffusion = 1
    DefaultElectrodeReactionSettings.TRHE = 50[degC]
    MembraneTransport.H2O_mem = 1
    icph1: ElectrolytePhase "电解质相 1" (default) | minput_temperature = T_fc_init
      init1: InitialValues "初始值 1" (default) | initphil = 0[V]
      ins1: Insulation "绝缘 1" (default)
    ecph1: ElectronicConductingPhase "电子导电相 1" (default)
      init1: InitialValues "初始值 1" (default) | initphis = 0[V]
      ins1: Insulation "绝缘 1" (default)
      egnd1: ElectricGround "电接地 1" on boundaries 4
      ec1: ElectrodeCurrent "电极电流 1" on boundaries 10 | Its = -I_fc*A_cell; d = W_cell
      inith2dom1: InitialValuesH2Domains "初始值，氢气域 1" on domains 2
      inito2dom1: InitialValuesO2Domains "初始值，氧气域 1" on domains 4
    h2gasph1: H2GasPhase "氢气相 1" (default) | u_src = fromCommonDef; minput_temperature = T_fc_init
      init1: InitialValues "初始值 1" (default) | x0H2O = x_a_v_in; pinit = (p_a_in+p_a_out)/2-1[atm]
      nflx1: NoFlux "无通量 1" (default)
      h2in1: H2Inlet "氢气入口 1" on boundaries 1
        FlowBoundaryCondition = TotalMassFlowRate
        p0 = p_a_in-1[atm]
        J0 = W_a_in
        p0bnd = p_a_in-1[atm]
        d = W_cell
      h2out1: H2Outlet "氢气出口 1" on boundaries 12 | p0 = p_a_out-1[atm]
      wce1: WaterCondensationEvaporation "水冷凝-蒸发 1" on domains 2-5
        CondensationEvaporationRateType = userdef
        k_ce = 0
        r_ce = r_ce_user
        minput_temperature = T_fc_init
    o2gasph1: O2GasPhase "氧气相 1" (default) | u_src = fromCommonDef; minput_temperature = T_fc_init
      init1: InitialValues "初始值 1" (default) | x0H2O = x_c_v_in; x0N2 = x_c_N2_in; pinit = (p_c_in+p_c_out)/2-1[atm]
      nflx1: NoFlux "无通量 1" (default)
      o2in1: O2Inlet "氧气入口 1" on boundaries 16
        MixtureSpecification = MoleFractions
        x0H2O = x_c_H2O_in_mix
        x0N2 = x_c_N2_in_mix
        FlowBoundaryCondition = TotalMassFlowRate
        p0 = p_c_in-1[atm]
        J0 = W_c_in
        p0bnd = p_c_in-1[atm]
        d = W_cell
      o2out1: O2Outlet "氧气出口 1" on boundaries 9 | p0 = p_c_out-1[atm]
      wce1: WaterCondensationEvaporation "水冷凝-蒸发 1" on domains 1-4
        CondensationEvaporationRateType = userdef
        k_ce = r_ce_user
        r_ce = r_ce_user
        minput_temperature = T_fc_init
    mem1: Membrane "膜 1" on domains 3 | minput_temperature = T_fc_init
      init1: InitialValues "初始值 1" (default) | aw0 = (RH_a_in+RH_c_in)/2; T0 = T_fc_init
      wadh2side1: WaterAbsorptionDesorptionH2Side "水的吸附-解吸，氢侧 1" (default)
        ElectrolyteMaterial = mat1
        minput_temperature = T_fc_init
      wado2side1: WaterAbsorptionDesorptionO2Side "水的吸附-解吸，氧侧 1" (default)
        ElectrolyteMaterial = mat1
        minput_temperature = T_fc_init
    h2gdl1: H2GasDiffusionLayer "氢气扩散层 1" on domains 2
      sigmas = sigmal_GDL
      minput_temperature = T_fc_init
      epsg = epsg_GDL
      kappag = K_GDL
    o2gdl1: O2GasDiffusionLayer "氧气扩散层 1" on domains 4
      sigmas = sigmal_GDL
      minput_temperature = T_fc_init
      epsg = epsg_GDL
      kappag = K_GDL
    h2fch1: H2FlowChannel "氢气流道 1" on domains 1 | kappag = K_CH_a
    o2fch1: O2FlowChannel "氧气流道 1" on domains 5 | kappag = K_CH_c
    th2gde1: ThinH2GasDiffusionElectrode "薄氢气扩散电极 1" on boundaries 6 | d_gde = L_CL; minput_temperature = T_fc_init
      th2gder1: ThinH2GasDiffusionElectrodeReaction "薄氢气扩散电极反应 1" (default) | minput_temperature = T_fc_init
    to2gde1: ThinO2GasDiffusionElectrode "薄氧气扩散电极 1" on boundaries 8 | d_gde = L_CL; minput_temperature = T_fc_init
      to2gder1: ThinO2GasDiffusionElectrodeReaction "薄氧气扩散电极反应 1" (default) | minput_temperature = T_fc_init
  ge_heat: GlobalEquations "0D lumped stack thermal model" (disabled)
    ge1: GlobalEquations "Stack heat balance"
      name = T_stack_lumped
      equation = Q_heat_stack-Q_cool_model-Q_amb_model
      initialValueU = T_cell_exp
      initialValueUt = 0[K/s]
      description = Full-stack lumped temperature solved from fuel-cell heat generation and empirical coolant heat rejection
      valueType = real
      fieldName = ODE1
      DependentVariableQuantity = temperature
      CustomDependentVariableUnit = K
      SourceTermQuantity = power
      CustomSourceTermUnit = W
  br: PorousMediaFlowBrinkman "Brinkman 方程" on domains 4, 5
    dependent variable u = {u, v, w}
    PhysicalModelProperty.PorousWallTreatment = PorousResolvedWall
    porous1: PorousMedium "多孔介质 1" (default)
      fluid1: FluidPorousMedium "流体 1" (default) | minput_temperature = T_fc_init
      pm1: PorousMatrixPorousMedium "多孔基体 1" (default)
        epsilon_p_mat = userdef
        epsilon_p = epsg_GDL
        kappa_mat = userdef
        kappa = K_GDL
    init1: init "初始值 1" (default) | u_init = {U_c_in, 0, 0}; p_init = (p_c_in+p_c_out)/2-1[atm]
    wallbc1: WallBC "壁 1" (default)
    porous2: PorousMedium "多孔介质 2" on domains 5
      fluid1: FluidPorousMedium "流体 1" (default) | minput_temperature = T_fc_init
      pm1: PorousMatrixPorousMedium "多孔基体 1" (default)
        epsilon_p_mat = userdef
        epsilon_p = epsg_CH_c
        kappa_mat = userdef
        kappa = K_CH_c
    init2: init "初始值 2" on domains 4 | p_init = (p_c_in+p_c_out)/2-1[atm]
    inl2: InletBoundary "入口 2" on boundaries 16
      BoundaryCondition = MassFlow
      multipleInlets = 0
      mfr = W_c_in
      Dbnd = W_cell
    out2: OutletBoundary "出口 2" on boundaries 9 | p0 = p_c_out-1[atm]
  br2: PorousMediaFlowBrinkman "Brinkman 方程 2" on domains 1, 2
    dependent variable u2 = {u2, v2, w2}
    PhysicalModelProperty.PorousWallTreatment = PorousResolvedWall
    porous1: PorousMedium "多孔介质 1" (default)
      fluid1: FluidPorousMedium "流体 1" (default) | minput_temperature = T_fc_init
      pm1: PorousMatrixPorousMedium "多孔基体 1" (default)
        epsilon_p_mat = userdef
        epsilon_p = epsg_GDL
        kappa_mat = userdef
        kappa = K_GDL
    init1: init "初始值 1" (default)
    wallbc1: WallBC "壁 1" (default)
    porous2: PorousMedium "多孔介质 2" on domains 1
      fluid1: FluidPorousMedium "流体 1" (default) | minput_temperature = T_fc_init
      pm1: PorousMatrixPorousMedium "多孔基体 1" (default)
        epsilon_p_mat = userdef
        epsilon_p = epsg_CH_a
        kappa_mat = userdef
        kappa = K_CH_a
    init2: init "初始值 2" on domains 1 | u_init = {U_a_in, 0, 0}; p_init = (p_a_in+p_a_out)/2-1[atm]
    inl1: InletBoundary "入口 1" on boundaries 1
      BoundaryCondition = MassFlow
      multipleInlets = 0
      mfr = W_a_in
      Dbnd = W_cell
    out1: OutletBoundary "出口 1" on boundaries 12 | p0 = p_a_out-1[atm]

Multiphysics
  rfo1: ReactingFlowO2GasPhase "反应流，氧气相 1" on all domains | Fluid_physics = br; Species_physics = fc
  rfh1: ReactingFlowH2GasPhase "反应流，氢气相 1" on all domains | Fluid_physics = br2; Species_physics = fc

Mesh
  mesh1 "网格 1"
    size: MeshSizeDefault "大小" | hmax = 0.0191; hmin = 8.55E-5; hcurve = 0.3; hgrad = 1.3
    edg1: Edge "边 1" on boundaries 1, 3, 5, 7, 9
      dis1: Distribution "分布 1" on boundaries 1, 9 | numelem = 10
      dis2: Distribution "分布 2" on boundaries 3, 7 | numelem = 10
      dis3: Distribution "分布 3" on boundaries 5 | numelem = 4
    cpe1: CopyEdge "复制边 1" | source = boundaries 1, 3, 5, 7, 9; destination = boundaries 12-16
    edg2: Edge "边 2" on boundaries 2, 4, 6, 8, 10, 11
      size1: Size "大小 1" on boundaries 2, 4, 6, 8, 10, 11 | table = cfd; hauto = 7
    map1: Map "映射 1" on remaining entities

Studies
  std1 "研究 1"
    cdi: CurrentDistributionInitialization "电流分布初始化" | ftplistmethod = manual; solve for = {fc, br, br2}
    cdi2: CurrentDistributionInitialization "电流分布初始化 2" | initType = secondary; solve for = {fc, br, br2}
    stat2: Stationary "稳态" | solve for = {br, br2}
    stat: Stationary "稳态 2" | useparam = on; pname = alpha_cyc; plistarr = 0 0.1 0.2 0.3; punit = 1

Solver configurations
  sol1 "解 1" (study std1)
    v1: Variables "因变量 1"
    s1: Stationary "稳态求解器 1"
      fc1: FullyCoupled "全耦合 1"
      d1: Direct "直接 (fc)"
    su1: StoreSolution "解存储 1"
    v2: Variables "因变量 2"
    s2: Stationary "稳态求解器 2"
      fc1: FullyCoupled "全耦合 1"
      d1: Direct "直接 (fc)"
    su2: StoreSolution "解存储 2"
    v3: Variables "因变量 3"
    s3: Stationary "稳态求解器 3"
      fc1: FullyCoupled "全耦合 1"
      d1: Direct "直接，流体流动变量 (br) (已合并)"
    su3: StoreSolution "解存储 3"
    v4: Variables "因变量 4"
    s4: Stationary "稳态求解器 4"
      p1: Parametric "参数化 1"
      fc1: FullyCoupled "全耦合 1"
      d1: Direct "直接，流体流动变量 (br) (已合并)"
  sol4 "解存储 3" (study std1)
  sol3 "解存储 2" (study std1)
  sol2 "解存储 1" (study std1)

Datasets
  dset1: Solution | solution = sol1
  dset2: Solution | solution = sol2
  dset3: Solution | solution = sol3
  dset4: Solution "探针解 4" | solution = sol1
  avh1: Average "Intermediate | Cathode inlet pressure boundary average" on boundaries 16 | data = dset4
  avh2: Average "Intermediate | Cathode outlet pressure boundary average" on boundaries 9 | data = dset4
  avh3: Average "Intermediate | Cathode outlet O2 mass fraction" on boundaries 9 | data = dset4
  avh4: Average "Intermediate | Cathode outlet N2 mass fraction" on boundaries 9 | data = dset4
  avh5: Average "Intermediate | Cathode outlet H2O mass fraction" on boundaries 9 | data = dset4
  avh6: Average "Intermediate | Cathode outlet O2 flux" on boundaries 9 | data = dset4
  avh7: Average "Intermediate | Cathode outlet N2 flux" on boundaries 9 | data = dset4
  avh8: Average "Intermediate | Cathode outlet H2O flux" on boundaries 9 | data = dset4
  avh9: Average "Intermediate | Anode inlet pressure boundary average" on boundaries 1 | data = dset4
  avh10: Average "Intermediate | Anode outlet pressure boundary average" on boundaries 12 | data = dset4
  avh11: Average "KeyOutput | Cathode O2 partial pressure average" on domains 4, 5 | data = dset4
  avh12: Average "KeyOutput | Cathode RH average" on domains 4, 5 | data = dset4
  avh13: Average "KeyOutput | Membrane water content average" on domains 3 | data = dset4
  int1: Integral "KeyOutput | Condensation evaporation integrated source per cell" on domains 4, 5 | data = dset4
  dset5: Solution | solution = sol4

Derived values
  pev1: EvalPoint "Intermediate | Cathode inlet pressure boundary average"
    data = avh1
    table = tbl_fit_intermediate
    expr = fc.pA
  pev2: EvalPoint "Intermediate | Cathode outlet pressure boundary average"
    data = avh2
    table = tbl_fit_intermediate
    expr = fc.pA
  pev3: EvalPoint "Intermediate | Cathode outlet O2 mass fraction"
    data = avh3
    table = tbl_fit_intermediate
    expr = fc.wO2
  pev4: EvalPoint "Intermediate | Cathode outlet N2 mass fraction"
    data = avh4
    table = tbl_fit_intermediate
    expr = fc.wN2
  pev5: EvalPoint "Intermediate | Cathode outlet H2O mass fraction"
    data = avh5
    table = tbl_fit_intermediate
    expr = fc.wH2O
  pev6: EvalPoint "Intermediate | Cathode outlet O2 flux"
    data = avh6
    table = tbl_fit_intermediate
    expr = fc.tfluxMagO2*L_CH*W_cell
  pev7: EvalPoint "Intermediate | Cathode outlet N2 flux"
    data = avh7
    table = tbl_fit_intermediate
    expr = fc.tfluxMagN2*L_CH*W_cell
  pev8: EvalPoint "Intermediate | Cathode outlet H2O flux"
    data = avh8
    table = tbl_fit_intermediate
    expr = fc.tfluxMagH2O*L_CH*W_cell
  pev9: EvalPoint "Intermediate | Anode inlet pressure boundary average"
    data = avh9
    table = tbl_fit_intermediate
    expr = fc.pA
  pev10: EvalPoint "Intermediate | Anode outlet pressure boundary average"
    data = avh10
    table = tbl_fit_intermediate
    expr = fc.pA
  gev1: EvalGlobal "Intermediate | Case index" | data = dset4; table = tbl_fit_intermediate; expr = case_idx
  gev2: EvalGlobal "Intermediate | Cathode inlet flow measured stack"
    data = dset4
    table = tbl_fit_intermediate
    expr = W_c_stack_in
  gev3: EvalGlobal "Intermediate | Cathode inlet flow per cell"
    data = dset4
    table = tbl_fit_intermediate
    expr = W_c_in
  gev4: EvalGlobal "Intermediate | Reconstructed stack inlet flow"
    data = dset4
    table = tbl_fit_intermediate
    expr = N_cell*W_c_in
  gev5: EvalGlobal "Intermediate | Stack inlet flow scaling residual"
    data = dset4
    table = tbl_fit_intermediate
    expr = N_cell*W_c_in-W_c_stack_in
  gev6: EvalGlobal "Intermediate | Cathode oxygen stoichiometry per cell"
    data = dset4
    table = tbl_fit_intermediate
    expr = lam_c
  gev7: EvalGlobal "Intermediate | Cathode exhaust recycle fraction"
    data = dset4
    table = tbl_fit_intermediate
    expr = alpha_cyc
  pev11: EvalPoint "KeyOutput | Cathode O2 partial pressure average"
    data = avh11
    table = tbl_fit_key_output
    expr = fc.pO2
  pev14: EvalPoint "KeyOutput | Cathode RH average" | data = avh12; table = tbl_fit_key_output; expr = fc.RH
  pev16: EvalPoint "KeyOutput | Membrane water content average"
    data = avh13
    table = tbl_fit_key_output
    expr = lambda_H2O_mem
  pev17: EvalPoint "KeyOutput | Condensation evaporation integrated source per cell"
    data = int1
    table = tbl_fit_key_output
    expr = r_ce_user*W_cell
  gev8: EvalGlobal "Objective | Cathode pressure drop model"
    data = dset4
    table = tbl_fit_objective
    expr = p_c_in_bavg-p_c_out_bavg
  gev9: EvalGlobal "Objective | Cathode pressure drop experiment"
    data = dset4
    table = tbl_fit_objective
    expr = exp_dpc(case_idx)
  gev10: EvalGlobal "Objective | Cathode pressure drop residual"
    data = dset4
    table = tbl_fit_objective
    expr = p_c_in_bavg-p_c_out_bavg-exp_dpc(case_idx)
  gev11: EvalGlobal "Objective | Lumped stack temperature model"
    data = dset4
    table = tbl_fit_objective
    expr = T_stack_lumped
  gev12: EvalGlobal "Objective | Measured temperature proxy" | data = dset4; table = tbl_fit_objective; expr = T_cell_exp
  gev13: EvalGlobal "Objective | Lumped stack temperature residual"
    data = dset4
    table = tbl_fit_objective
    expr = T_stack_lumped-T_cell_exp
  gev14: EvalGlobal "Objective | Coolant heat rejection model"
    data = dset4
    table = tbl_fit_objective
    expr = Q_cool_model
  gev15: EvalGlobal "Objective | Coolant heat removal experiment"
    data = dset4
    table = tbl_fit_objective
    expr = Q_cool_exp
  gev16: EvalGlobal "Objective | Coolant heat residual"
    data = dset4
    table = tbl_fit_objective
    expr = Q_cool_model-Q_cool_exp
  gev17: EvalGlobal "Objective | Experimental cell voltage" | data = dset4; table = tbl_fit_objective; expr = V_cell_exp

Tables
  tbl_fit_objective: Table "Fit objectives and residuals"
    alpha_cyc (1) | Objective | Cathode pressure drop model (kPa) | Objective | Cathode pressure drop experiment (kPa) | Objective | Cathode pressure drop residual (kPa) | Objective | Lumped stack temperature model | Objective | Measured temperature proxy (K) | Objective | Lumped stack temperature residual | Objective | Coolant heat rejection model | Objective | Coolant heat removal experiment (W) | Objective | Coolant heat residual (W) | Objective | Experimental cell voltage (V)
    0 | 7.07139 | 7.5 | -0.428611 | nan | 334.25 | nan | nan | -382.017 | nan | 0.801656
    0.1 | 7.06537 | 7.5 | -0.434626 | nan | 334.25 | nan | nan | -382.017 | nan | 0.801656
    0.2 | 7.05894 | 7.5 | -0.441063 | nan | 334.25 | nan | nan | -382.017 | nan | 0.801656
    0.3 | 7.05197 | 7.5 | -0.448035 | nan | 334.25 | nan | nan | -382.017 | nan | 0.801656
  tbl_fit_intermediate: Table "Fit intermediate variables and scaling checks"
    alpha_cyc (1) | Boundary pressure used to form cathode pressure-drop objective (kPa), Intermediate | Cathode inlet pressure boundary average | Boundary pressure used to form cathode pressure-drop objective (kPa), Intermediate | Cathode outlet pressure boundary average | Intermediate | Cathode outlet O2 mass fraction (1), Intermediate | Cathode outlet O2 mass fraction | Intermediate | Cathode outlet N2 mass fraction (1), Intermediate | Cathode outlet N2 mass fraction | Intermediate | Cathode outlet H2O mass fraction (1), Intermediate | Cathode outlet H2O mass fraction | Intermediate | Cathode outlet O2 flux (kg/s), Intermediate | Cathode outlet O2 flux | Intermediate | Cathode outlet N2 flux (kg/s), Intermediate | Cathode outlet N2 flux | Intermediate | Cathode outlet H2O flux (kg/s), Intermediate | Cathode outlet H2O flux | Intermediate | Anode inlet pressure boundary average (kPa), Intermediate | Anode inlet pressure boundary average | Intermediate | Anode outlet pressure boundary average (kPa), Intermediate | Anode outlet pressure boundary average | Intermediate | Case index (1)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
    0 | 140.896 | 133.825 | 0.16965 | 0.724851 | 0.1055 | 1.02919e-05 | 4.39695e-05 | 6.39963e-06 | 147.275 | 144.725 | 1
    0.1 | 140.89 | 133.825 | 0.165605 | 0.728842 | 0.105554 | 1.00368e-05 | 4.41687e-05 | 6.39665e-06 | 147.276 | 144.725 | 1
    0.2 | 140.884 | 133.825 | 0.160611 | 0.73377 | 0.105618 | 9.72423e-06 | 4.4422e-05 | 6.39401e-06 | 147.277 | 144.725 | 1
    0.3 | 140.877 | 133.825 | 0.154292 | 0.740009 | 0.105698 | 9.33167e-06 | 4.47516e-05 | 6.39193e-06 | 147.278 | 144.725 | 1
  tbl_fit_key_output: Table "Fit key mechanism outputs"
    alpha_cyc (1) | KeyOutput | Cathode O2 partial pressure average (kPa), KeyOutput | Cathode O2 partial pressure average | KeyOutput | Cathode RH average (1), KeyOutput | Cathode RH average | KeyOutput | Membrane water content average (1), KeyOutput | Membrane water content average | KeyOutput | Condensation evaporation integrated source per cell (mol/s), KeyOutput | Condensation evaporation integrated source per cell
    0 | 22.1922 | 0.966812 | 10.9744 | nan
    0.1 | 21.6868 | 0.974524 | 11.1224 | nan
    0.2 | 21.0735 | 0.981864 | 11.266 | nan
    0.3 | 20.3091 | 0.988773 | 11.4036 | nan

Plots
  pg_fit_p: PlotGroup2D "Fit 2D pressure field (HFC Darcy)" | data = dset1
    surf1: Surface "表面 1" | expr = fc.pA; unit = kPa
  pg_fit_xo2: PlotGroup2D "Fit 2D cathode O2 mole fraction" | data = dset1
    surf1: Surface "表面 1" | expr = fc.xO2
  pg_fit_po2: PlotGroup2D "Fit 2D cathode O2 partial pressure" | data = dset1
    surf1: Surface "表面 1" | expr = fc.pO2; unit = kPa
  pg_fit_rh: PlotGroup2D "Fit 2D relative humidity" | data = dset1
    surf1: Surface "表面 1" | expr = fc.RH
  pg_fit_aw: PlotGroup2D "Fit 2D water activity" | data = dset1
    surf1: Surface "表面 1" | expr = fc.aw
  pg_fit_cond: PlotGroup2D "Fit 2D condensation evaporation rate" | data = dset1
    surf1: Surface "表面 1" | expr = r_ce_user
  pg_fit_phis: PlotGroup2D "Fit 2D electronic potential" | data = dset1
    surf1: Surface "表面 1" | expr = fc.phis
  pg_fit_phil: PlotGroup2D "Fit 2D electrolyte potential" | data = dset1
    surf1: Surface "表面 1" | expr = fc.phil
  pg1: PlotGroup1D "探针绘图组 1"
    tblp1: Table "探针表图 1" | table = tbl_fit_intermediate; plotcolumninput = manual
    tblp2: Table "探针表图 2" | table = tbl_fit_key_output
    tblp3: Table "探针表图 3" | table = tbl_fit_objective; plotcolumninput = manual